! ----------------------------------------------------------------------------
! ----------------------------------------------------------------------------
! Projekt:      Benchmarktest TENSION
! Objekt:       Forschung
! Modelling:    Marius Weber
! Datum:        July 2021
! test after 12:230
!
! ----------------------------------------------------------------------------
! ----------------------------------------------------------------------------
!
!-------------------------------------------------------------------------------
! 00 MAIN INPUT FILE
!-------------------------------------------------------------------------------
!
!-------------------------------------------------------------------------------
! 1.    ALLGEMEIN
!-------------------------------------------------------------------------------
!
! 1.1   Clear und Neustart der Berechnung
!-------------------------------------------------------------------------------
!
finish
/clear
Pfad_Ass_Mat_Ele = '01_Ass_Mat_Ele'
Pfad_failure_check = 'XX_Result_Failure_Check'
Pfad_multiframe_restart = 'XX_Multiframe_Restart'
Pfad_vwrite = 'XX_vwrite_failure_analysis'
Pfad_results = '02_Results'
Pfad_Parameter = 'Parameterfile'
Pfad_Resultate_Nonlinear_Extract = '09.2_Result_Nonlinear_Extract'
Pfad_Resultate_deformed_mesh = '09.3_Result_deformed_Mesh'
Pfad_shear_strength = 'XX_shear_strength'
Pfad_element_selection = 'XX_sel_ele_by_user_area'

!
/Input,Pfad_Parameter,inp,,0,0
!
! 1.2 Einstellungen
! ----------------------------------------------------------------------------
!
! Auswahl Analyse Art
nlfe=1                              ! '0': Elastische Analyse
                                    ! '1': NLFE-Analyse
!
! Auswahl Analyse Dimension
Dimens = 2                          ! '1': 2D (Plane 182)
                                    ! '2': 3D (SHELL 181)
! Auswahl Druckfeldmodell
Modell = 1                          ! '1': Cracked membrane model (CMM)
                                    ! '2': Original compression field m. (OCF)
                                    ! '3': Modified compression field m. (MCFT)
!
! Dichte von Beton
rho_B=0.0000025                   ! [g/mm^3]
!
! Lokale Variable
nreal = 0                           ! Anzahl real constants (bei Shell=0)
!
!
! ----------------------------------------------------------------------------
! 2. PREPROCESSING 1
! ----------------------------------------------------------------------------
!
/prep7
k,,0,0,0
k,,2000,0,0
k,,2000,2000,0
k,,0,2000,0

a,1,2,3,4


! ----------------------------------------------------------------------------
! 2.2 Geometrische Definitionen
! ----------------------------------------------------------------------------
!
n_F=1
*DIM,oo,ARRAY,n_F
*DIM,uu,ARRAY,n_F
*DIM,rho,ARRAY,n_F
*DIM,R_Rohr,ARRAY,n_F
*do,ii,1,n_F
  R_Rohr(ii) = -1                   ! Hohlk�rperplatte (R_Rohr=radius)
  rho(ii) = rho_B                   ! Dichte von Beton [g/mm^3]
  oo(ii)  =  30                     ! Bewehrungs��berdeckung oben
  uu(ii)  =  30                     ! Bewehrungs��berdeckung unten
*enddo
!
! 2.3 Werkstoffparameter f��r die Bewehrungen
! ----------------------------------------------------------------------------
!
! 2.3.1 Aufbau der Vektoren f�r die 1., 2., 3. und 4. Lage
! --------------------------------------------------------
!
! Aufbau Vektoren f��r 1. Lage
*DIM,stahl1,ARRAY,n_F
*DIM,zm1,ARRAY,n_F
*DIM,fsy1,ARRAY,n_F
*DIM,fsu1,ARRAY,n_F
*DIM,esu1,ARRAY,n_F
*DIM,esv1,ARRAY,n_F
*DIM,Es1,ARRAY,n_F
*DIM,ka1,ARRAY,n_F
*DIM,kb1,ARRAY,n_F
*DIM,kc1,ARRAY,n_F
*DIM,as1,ARRAY,n_F
*DIM,dm1,ARRAY,n_F
*DIM,psi1,ARRAY,n_F
!
! Aufbau Vektoren f��r 2. Lage
*DIM,stahl2,ARRAY,n_F
*DIM,zm2,ARRAY,n_F
*DIM,fsy2,ARRAY,n_F
*DIM,fsu2,ARRAY,n_F
*DIM,esu2,ARRAY,n_F
*DIM,esv2,ARRAY,n_F
*DIM,Es2,ARRAY,n_F
*DIM,ka2,ARRAY,n_F
*DIM,kb2,ARRAY,n_F
*DIM,kc2,ARRAY,n_F
*DIM,as2,ARRAY,n_F
*DIM,dm2,ARRAY,n_F
*DIM,psi2,ARRAY,n_F
!
! Aufbau Vektoren f��r 3. Lage
*DIM,stahl3,ARRAY,n_F
*DIM,zm3,ARRAY,n_F
*DIM,fsy3,ARRAY,n_F
*DIM,fsu3,ARRAY,n_F
*DIM,esu3,ARRAY,n_F
*DIM,esv3,ARRAY,n_F
*DIM,Es3,ARRAY,n_F
*DIM,ka3,ARRAY,n_F
*DIM,kb3,ARRAY,n_F
*DIM,kc3,ARRAY,n_F
*DIM,as3,ARRAY,n_F
*DIM,dm3,ARRAY,n_F
*DIM,psi3,ARRAY,n_F
!
! Aufbau Vektoren f��r 4. Lage
*DIM,stahl4,ARRAY,n_F
*DIM,zm4,ARRAY,n_F
*DIM,fsy4,ARRAY,n_F
*DIM,fsu4,ARRAY,n_F
*DIM,esu4,ARRAY,n_F
*DIM,esv4,ARRAY,n_F
*DIM,Es4,ARRAY,n_F
*DIM,ka4,ARRAY,n_F
*DIM,kb4,ARRAY,n_F
*DIM,kc4,ARRAY,n_F
*DIM,as4,ARRAY,n_F
*DIM,dm4,ARRAY,n_F
*DIM,psi4,ARRAY,n_F
!
! 2.3.2 Zuordnung der Werkstoffparameter f�r alle Ansys Fl�chen
! -------------------------------------------------------------
!
f_sy = fsy_P                        ! Fliesspannung/Beiwert [N/mm2]
f_su = fsu_P                        ! Bruchspannung/Beiwert [N/mm2]
!
*do,ii,1,n_F
!
    ! 1. Lage
    stahl1(ii) = 1                  ! '1': bilin.,'2': kv,'3': wv
    zm1(ii) = 2                     ! '1': bilin.,'2': bl_seel,'3': kv, '4': wv
    fsy1(ii) = f_sy                 ! Fliesspannung/Beiwert [N/mm2]
    fsu1(ii) = f_su                 ! Bruchspannung/Beiwert [N/mm2]
    esu1(ii) = 0.15                ! Bruchverzerrung*Beiwert [-]
    esv1(ii) = 0.018                ! F�r bilin. nicht ben�tigt [-]
    Es1(ii) = 200000                ! Elastizit�tsmodul [N/mm2]
    ka1(ii) = -1                    ! F�r bilin. nicht ben�tigt [-]
    kb1(ii) = -1                    ! F�r bilin. nicht ben�tigt [-]
    kc1(ii) = -1                    ! F�r bilin. nicht ben�tigt [-]
    as1(ii) = 2
    dm1(ii) = 20
    psi1(ii) = 90
!
    ! 2. Lage
    stahl2(ii) = 1
    zm2(ii) = 2
    fsy2(ii) = f_sy
    fsu2(ii) = f_su
    esu2(ii) = 0.15
    esv2(ii) = 0.018
    Es2(ii) = 200000
    ka2(ii) = -1
    kb2(ii) = -1
    kc2(ii) = -1
    as2(ii) = 2
    dm2(ii) = 20
    psi2(ii) = 0
!
    ! 3. Lage
    stahl3(ii) = 1
    zm3(ii) = 2
    fsy3(ii) = f_sy
    fsu3(ii) = f_su
    esu3(ii) = 0.15
    esv3(ii) = 0.018
    Es3(ii) = 200000
    ka3(ii) = -1
    kb3(ii) = -1
    kc3(ii) = -1
    as3(ii) = 2
    dm3(ii) = 20
    psi3(ii) = 0
!
    ! 4. Lage
    stahl4(ii) = 1
    zm4(ii) = 2
    fsy4(ii) = f_sy
    fsu4(ii) = f_su
    esu4(ii) = 0.15
    esv4(ii) = 0.018
    Es4(ii) = 200000
    ka4(ii) = -1
    kb4(ii) = -1
    kc4(ii) = -1
    as4(ii) = 2
    dm4(ii) = 20
    psi4(ii) = 90
*enddo
!
!
! 2.4 Werkstoffparameter f��r den Beton
! ----------------------------------------------------------------------------
!
! 2.4.1 Aufbau der Vektoren f�r alle Ansys Fl�chen
! ------------------------------------------------
!
*DIM,beton,ARRAY,n_F
*DIM,fcc,ARRAY,n_F
*DIM,k_E,Array,n_F
*DIM,vc,ARRAY,n_F
*DIM,ecu,ARRAY,n_F
*DIM,theta_b0,ARRAY,n_F
*DIM,theta_b1,ARRAY,n_F
*DIM,k_riss,ARRAY,n_F
*DIM,Entfestigung,ARRAY,n_F
*DIM,lambda,ARRAY,n_F
*DIM,srmx,ARRAY,n_F
*DIM,srmy,ARRAY,n_F
*DIM,Begrenzung,ARRAY,n_F
*DIM,KritQ,ARRAY,n_F
*DIM,winkelD,ARRAY,n_F
*DIM,k_vr,ARRAY,n_F
*DIM,fswy,ARRAY,n_F
!
! 2.4.2 Zuordnung der Werkstoffparameter f�r alle Ansys Fl�chen
! -------------------------------------------------------------
f_c=fcd_P
tau_cd=tau_cd_P
D_max=D_max_P
!
*do,ii,1,n_F
  beton(ii)    = 2                  ! '1': sargin_cs,'2': kauf_cs,'3': sargin_cc
  fcc(ii)      = f_c                ! Druckfestigkeit/Beiwert [N/mm2]
  vc(ii)       = 0                ! Querdehnung
  ecu(ii)      = -0.2            ! Bruchverzerrung [-]    ! negativ
  k_E(ii)      = 10000              ! Grundeinstellung: 10000
  theta_b0(ii) = 2                  ! Grundeinstellung: 2
  theta_b1(ii) = 1                  ! Grundeinstellung: 1
  k_riss(ii)   = kRiss_P            ! From Subfile "Parameter"
  Entfestigung(ii) = 0              ! '0': Verfestigung
                                    ! '1': Entfestigung Druckmodelle
                                    ! '2': Entfestigung Druckmodelle und CMM
!
! Rissabstand
  lambda(ii) = 0.67                 ! Mittelwert
  srmx(ii) = 1                      ! '1':Grundeinstellung f�r auto. Berechnung
  srmy(ii) = 1                      ! '1':Grundeinstellung f�r auto. Berechnung
  Begrenzung(ii) = 2                ! '1' : Rissweitenlimitierung ja
                                    ! '2' : Rissweitenlimitierung nein
!
! Ber��cksichtigung Einfluss Querkraft auf Zugkraft
  KritQ(ii) = 0                     ! '0': nicht Ber�cksichtigen
		 	                        ! '1': vrc = f_vr*1/3 fct
                                    ! '2': vrc = f_vr*1/6*sqrt(fcc)
  winkelD(ii)=45                    ! Winkel der Druckdiagonalen
  k_vr(ii) = 1                      ! Faktor OneWayShear
  fswy(ii) = 500                    ! Fliessgrenze Schubbewehrung  [N/mm2]
*enddo
!
! User defined area for shear check (defide strucutre in areas)


! 2.5 Assemblierung
! ----------------------------------------------------------------------------
!
! 2.5.1 Assmblierung der Materialien und Elementetypen
! ----------------------------------------------------
!
/Input,Pfad_Ass_Mat_Ele,inp,,0,0
!
! 2.5.2 Zuweisen der Elementattribute
! -----------------------------------
!
allsel
*do,ii,1,n_F
    asel,s,,,ii
    aatt,ii,1,ii,,ii
    asel,all
*enddo
 allsel

!
! 2.6 Vernetzung der Struktur
! ----------------------------------------------------------------------------
!
eg = 400                          ! Wahl der Meshgr�sse
lesize,all,eg
asel,all
mshkey,3                            ! Mapped Meshing
mshape,0,2D                         ! 2D Mesh
amesh,all                           ! Erstellung Mesh (Knoten und Elemente)
!NUMMRG,ALL

!
! 2.8 Lagerung des Bauteiles
! ----------------------------------------------------------------------------
!
dl,all,,all,0
allsel
!
! Loads
load_value=-50000
F,21,FZ,load_value
F,25,FZ,load_value
F,29,FZ,load_value
F,33,FZ,load_value

F,34,FZ,load_value
F,22,FZ,load_value

F,23,FZ,load_value
F,35,FZ,load_value

F,36,FZ,load_value
F,32,FZ,load_value
F,28,FZ,load_value
F,24,FZ,load_value

!
finish

!
! 2.8 Define area for shear check
! ----------------------------------------------------------------------------
! Eingabe immer Gegenuhrzeigersinn (betrachtung von dieser Seite, dass Koor 1 nach rechts und Koor 2 nach oben)
n_SC=1
*DIM,x1,ARRAY,n_SC
*DIM,x2,ARRAY,n_SC
*DIM,x3,ARRAY,n_SC
*DIM,x4,ARRAY,n_SC
*DIM,y1,ARRAY,n_SC
*DIM,y2,ARRAY,n_SC
*DIM,y3,ARRAY,n_SC
*DIM,y4,ARRAY,n_SC
*DIM,z1,ARRAY,n_SC
*DIM,z2,ARRAY,n_SC
*DIM,z3,ARRAY,n_SC
*DIM,z4,ARRAY,n_SC
x1(1) = 0!400
x2(1) = 2000!1600
x3(1) = 2000!1600
x4(1) = 0!400
y1(1) = 0!400
y2(1) = 0!400
y3(1) = 2000!1600
y4(1) = 2000!1600
z1(1) = 0
z2(1) = 0
z3(1) = 0
z4(1) = 0


! ----------------------------------------------------------------------------
! 3. SOLUTION
! ----------------------------------------------------------------------------
!
/solu
!
! Konvergenzkriterien
CNVTOL,F,,0.9
CNVTOL,U,,0.9
CNVTOL,M,-1,3
!NCNV,0
!
! Solver-Einstellungen
autots,1                  ! automatische Zeitschritte (substeps) [1=ON ; 0=OFF]
nsubst,1,1,1                 ! size of first step, min, max
time,1                    ! Zeit am Ende des Lastschrittes
nropt,full,,on
!
! Speichern von Daten
outres,erase              ! Zur�cksetzen auf Standard-Einstellungen
outres,nsol,all !all     ! Nodal DOF solution
outres,rsol,all !all     ! Nodal reaction solution
outres,esol,all !all     ! Element solution
outres,svar,all !all     ! State variables (used by USERMAT)
!
solve

! -------------------------------------------------------------------------------------
! Failure check
/Input,Pfad_failure_check,inp,,0,0


! add additonal load steps
! -------------------------------------------------------------------------------------
/Input,Pfad_multiframe_restart,inp,,0,0

! Results Load-deformation curve
! -------------------------------------------------------------------------------------
/Input,Pfad_results,inp,,0,0
 !
/Input,Pfad_Resultate_Nonlinear_Extract,inp,,0,0
!/Input,Pfad_Resultate_deformed_mesh,inp,,0,0
